#define CASE=14
#ifexists "../case.glm"
#define DIR=..
#set pythonpath=..:${pythonpath}
#endif

module pypower
{
    controllers "controllers";
}

object pypower.load
{
    parent pp_bus_2;
    Vn 12.5 kV;
    P 10.0;
    status ONLINE;
    controller "load_control";
}

object pypower.powerplant
{
    parent pp_bus_2;
    S 10.0;
    status ONLINE;
    controller "powerplant_control";
}

#include "${DIR:-.}/case.glm"
